// SBML level 3 version 1

model CFFL_Persistence_Detector()
  // Coherent Feed-Forward Loop (AND Logic)

  // Compartments:
  compartment cell = 1;

  // Species:
  species $X in cell = 0;
  species Y in cell = 0;
  species Z in cell = 0;

  // Parameters:
  k_syn_Y = 10;
  k_syn_Z = 10;
  k_deg_Y = 0.5;
  k_deg_Z = 0.5;
  K_XY = 4;
  K_XZ = 4;
  K_YZ = 4;
  n = 4;

  // Reactions:
  R_syn_Y: => Y; k_syn_Y*(X^n/(K_XY^n + X^n));
  R_deg_Y: Y => ; k_deg_Y*Y;
  R_syn_Z: => Z; k_syn_Z*(X^n/(K_XZ^n + X^n))*(Y^n/(K_YZ^n + Y^n));
  R_deg_Z: Z => ; k_deg_Z*Z;

  // Events:
  Event_ShortPulse_Start: at (time >= 10), t0=false: X = 10;
  Event_ShortPulse_End: at (time >= 15), t0=false: X = 0;
  Event_LongPulse_Start: at (time >= 40), t0=false: X = 10;
  Event_LongPulse_End: at (time >= 70), t0=false: X = 0;
end
