// SBML level 3 version 1

model Coherent_Feedforward_Loop_AND_Gate()
  // E. coli CFFL Type 1
  // This model represents the Coherent Feedforward Loop (Type 1) described in Shen-Orr et al. (2002). Transcription factor X regulates Y, and both X and Y jointly regulate Z in an AND-gate configuration. (Sources: 82, 118-120, 311).
  // Functional Behavior: The circuit acts as a persistence detector. The intermediate Y acts as a delay timer. - Short pulse of X: Y does not reach the threshold; Z is not activated. - Persistent pulse of X: Y crosses threshold; X and Y are both present; Z is activated.

  // Compartments:
  compartment cell = 1;

  // Species:
  species $X in cell = 0;
  species Y in cell = 0;
  species Z in cell = 0;

  // Parameters:
  beta_y = 1;
  alpha_y = 0.5;
  beta_z = 1;
  alpha_z = 0.5;
  K_xy = 0.5;
  K_xz = 0.5;
  K_yz = 0.5;
  n = 4;

  // Reactions:
  synthesis_Y: => Y; beta_y*(X^n/(K_xy^n + X^n));  // modifiers: X
  degradation_Y: Y => ; alpha_y*Y;
  synthesis_Z: => Z; beta_z*(X^n/(K_xz^n + X^n))*(Y^n/(K_yz^n + Y^n));  // modifiers: X, Y
  degradation_Z: Z => ; alpha_z*Z;

  // Events:
  short_pulse_start: at (time >= 2), t0=false: X = 1;
  short_pulse_end: at (time >= 3.5), t0=false: X = 0;
  long_pulse_start: at (time >= 10), t0=false: X = 1;
  long_pulse_end: at (time >= 20), t0=false: X = 0;
end
