// SBML level 3 version 1

function stepFunction(signal, threshold)
  piecewise(1, signal >= threshold, 0);
end

model CoherentFeedForwardLoop_AND_Gate()
  // ShenOrr2002_CFFL_PulseFilter
  // Model of the Coherent Feedforward Loop (CFFL) with AND-gate logic, based on Shen-Orr et al. (2002) [Nature Genetics 31:64-68].
  // Logic: X -> Y; (X AND Y) -> Z. This structure functions as a persistence detector, rejecting transient pulses of X (noise) while responding to persistent signals.

  // Compartments:
  compartment cell = 1;

  // Species:
  species $X in cell = 0;
  species Y in cell = 0;
  species Z in cell = 0;

  // Parameters:
  T_xy = 0.5;
  T_xz = 0.5;
  T_yz = 0.5;
  beta_y = 1;
  beta_z = 1;
  alpha = 1;

  // Reactions:
  Synthesis_Y: => Y; beta_y*stepFunction(X, T_xy);
  Degradation_Y: Y => ; alpha*Y;
  Synthesis_Z: => Z; beta_z*stepFunction(X, T_xz)*stepFunction(Y, T_yz);
  Degradation_Z: Z => ; alpha*Z;

  // Events:
  Pulse1_On: at (time >= 2), t0=false: X = 1;
  Pulse1_Off: at (time >= 2.4), t0=false: X = 0;
  Pulse2_On: at (time >= 10), t0=false: X = 1;
  Pulse2_Off: at (time >= 20), t0=false: X = 0;
end
