// SBML level 3 version 1

model CFFL_Type1_AND_Logic()
  // Coherent Feed-Forward Loop (AND Logic)

  // Compartments:
  compartment cell = 1;

  // Species:
  species $X in cell = 0;
  species Y in cell = 0;
  species Z in cell = 0;

  // Parameters:
  k_syn_Y = 10;
  k_deg_Y = 0.5;
  k_syn_Z = 10;
  k_deg_Z = 0.5;
  K_XY = 5;
  K_XZ = 5;
  K_YZ = 5;
  n = 4;

  // Reactions:
  J_syn_Y: => Y; k_syn_Y*(X^n/(K_XY^n + X^n));  // modifiers: X
  J_deg_Y: Y => ; k_deg_Y*Y;
  J_syn_Z: => Z; k_syn_Z*(X^n/(K_XZ^n + X^n))*(Y^n/(K_YZ^n + Y^n));  // modifiers: X, Y
  J_deg_Z: Z => ; k_deg_Z*Z;

  // Events:
  ev_short_pulse_start: at (time >= 5), t0=false: X = 10;
  ev_short_pulse_end: at (time >= 8), t0=false: X = 0;
  ev_long_pulse_start: at (time >= 20), t0=false: X = 10;
  ev_long_pulse_end: at (time >= 40), t0=false: X = 0;
end
