// SBML level 3 version 1

model Repressilator_Robust()
  // Robust Genetic Clock (150min)
  // model units - time: minute

  // Compartments:
  compartment cell = 1;

  // Species:
  species mRNA_1 in cell = 20;
  species Protein_1 in cell = 0;
  species mRNA_2 in cell = 0;
  species Protein_2 in cell = 0;
  species mRNA_3 in cell = 0;
  species Protein_3 in cell = 0;

  // Parameters:
  alpha = 50;
  alpha0 = 0.05;
  beta = 10;
  k_deg_m = 0.5;
  k_deg_p = 0.04;
  n = 3;
  KM = 400;

  // Reactions:
  Tx_1: => mRNA_1; alpha0 + alpha*KM^n/(KM^n + Protein_3^n);  // modifiers: Protein_3
  Tl_1: => Protein_1; beta*mRNA_1;  // modifiers: mRNA_1
  Deg_m1: mRNA_1 => ; k_deg_m*mRNA_1;
  Deg_p1: Protein_1 => ; k_deg_p*Protein_1;
  Tx_2: => mRNA_2; alpha0 + alpha*KM^n/(KM^n + Protein_1^n);  // modifiers: Protein_1
  Tl_2: => Protein_2; beta*mRNA_2;  // modifiers: mRNA_2
  Deg_m2: mRNA_2 => ; k_deg_m*mRNA_2;
  Deg_p2: Protein_2 => ; k_deg_p*Protein_2;
  Tx_3: => mRNA_3; alpha0 + alpha*KM^n/(KM^n + Protein_2^n);  // modifiers: Protein_2
  Tl_3: => Protein_3; beta*mRNA_3;  // modifiers: mRNA_3
  Deg_m3: mRNA_3 => ; k_deg_m*mRNA_3;
  Deg_p3: Protein_3 => ; k_deg_p*Protein_3;
end
