// SBML level 3 version 1

model repressilator()
  // Elowitz_Leibler_Repressilator
  // This model represents the Repressilator, a synthetic oscillatory network of transcriptional regulators.
  // Reference: Elowitz, M. B., and Leibler, S. (2000). A synthetic oscillatory network of transcriptional regulators. Nature.
  // The system consists of three genes (Gene 1, Gene 2, Gene 3) in a cyclic negative feedback loop.

  // Compartments:
  compartment cell = 1;

  // Species:
  species m1 in cell = 0; m1 is "mRNA_1";
  species m2 in cell = 0; m2 is "mRNA_2";
  species m3 in cell = 0; m3 is "mRNA_3";
  species Protein_1 in cell = 0;
  species Protein_2 in cell = 5/cell;
  species Protein_3 in cell = 0;

  // Parameters:
  n = 2; n is "Hill_Coefficient";
  alpha = 216; alpha is "Transcription_Rate";
  alpha0 = 0.216; alpha0 is "Leakiness";
  beta = 0.2; beta is "Translation_Rate";
  dm = 1; dm is "mRNA_Decay_Rate";
  dp = 1; dp is "Protein_Decay_Rate";
  KM = 1; KM is "Binding_Constant";

  // Reactions:
  transcription_1: => m1; alpha0 + alpha/(1 + (Protein_3/KM)^n);  // modifiers: Protein_3
  translation_1: => Protein_1; beta*m1;  // modifiers: m1
  degradation_m1: m1 => ; dm*m1;
  degradation_p1: Protein_1 => ; dp*Protein_1;
  transcription_2: => m2; alpha0 + alpha/(1 + (Protein_1/KM)^n);  // modifiers: Protein_1
  translation_2: => Protein_2; beta*m2;  // modifiers: m2
  degradation_m2: m2 => ; dm*m2;
  degradation_p2: Protein_2 => ; dp*Protein_2;
  transcription_3: => m3; alpha0 + alpha/(1 + (Protein_2/KM)^n);  // modifiers: Protein_2
  translation_3: => Protein_3; beta*m3;  // modifiers: m3
  degradation_m3: m3 => ; dm*m3;
  degradation_p3: Protein_3 => ; dp*Protein_3;
end
