// SBML level 3 version 1

model repressilator()
  // Synthetic Oscillatory Network (Repressilator)

  // Compartments:
  compartment cell = 1;

  // Species:
  species mRNA1 in cell = 0;
  species mRNA2 in cell = 0;
  species mRNA3 in cell = 0;
  species P1 in cell = 5/cell;
  species P2 in cell = 0;
  species P3 in cell = 0;

  // Parameters:
  alpha = 100;
  alpha0 = 0.1;
  Km = 10;
  n = 2.5;
  beta = 5;
  dm = 1;
  dp = 0.2;

  // Reactions:
  transcription_G1: => mRNA1; alpha0 + alpha/(1 + (P3/Km)^n);  // modifiers: P3
  translation_P1: => P1; beta*mRNA1;  // modifiers: mRNA1
  degradation_mRNA1: mRNA1 => ; dm*mRNA1;
  degradation_P1: P1 => ; dp*P1;
  transcription_G2: => mRNA2; alpha0 + alpha/(1 + (P1/Km)^n);  // modifiers: P1
  translation_P2: => P2; beta*mRNA2;  // modifiers: mRNA2
  degradation_mRNA2: mRNA2 => ; dm*mRNA2;
  degradation_P2: P2 => ; dp*P2;
  transcription_G3: => mRNA3; alpha0 + alpha/(1 + (P2/Km)^n);  // modifiers: P2
  translation_P3: => P3; beta*mRNA3;  // modifiers: mRNA3
  degradation_mRNA3: mRNA3 => ; dm*mRNA3;
  degradation_P3: P3 => ; dp*P3;
end
